// SBML level 3 version 2

model Blasi_CellSystems2016__select_motif_specific()

  // Compartments:
  compartment compartment = 1;

  // Species:
  species x_0ac in compartment = 1; x_0ac is "x_{0ac}";
  species x_k05 in compartment = 0; x_k05 is "x_{k05}";
  species x_k08 in compartment = 0; x_k08 is "x_{k08}";
  species x_k12 in compartment = 0; x_k12 is "x_{k12}";
  species x_k16 in compartment = 0; x_k16 is "x_{k16}";
  species x_k05k08 in compartment = 0; x_k05k08 is "x_{k05k08}";
  species x_k05k12 in compartment = 0; x_k05k12 is "x_{k05k12}";
  species x_k05k16 in compartment = 0; x_k05k16 is "x_{k05k16}";
  species x_k08k12 in compartment = 0; x_k08k12 is "x_{k08k12}";
  species x_k08k16 in compartment = 0; x_k08k16 is "x_{k08k16}";
  species x_k12k16 in compartment = 0; x_k12k16 is "x_{k12k16}";
  species x_k05k08k12 in compartment = 0; x_k05k08k12 is "x_{k05k08k12}";
  species x_k05k08k16 in compartment = 0; x_k05k08k16 is "x_{k05k08k16}";
  species x_k05k12k16 in compartment = 0; x_k05k12k16 is "x_{k05k12k16}";
  species x_k08k12k16 in compartment = 0; x_k08k12k16 is "x_{k08k12k16}";
  species x_4ac in compartment = 0; x_4ac is "x_{4ac}";

  // Parameters:
  a_b = 0;
  da_b = 1;
  a_0ac_k05 = 0; a_0ac_k05 is "a_{0ac\\rightarrow k05}";
  a_0ac_k08 = 0; a_0ac_k08 is "a_{0ac\\rightarrow k08}";
  a_0ac_k12 = 0; a_0ac_k12 is "a_{0ac\\rightarrow k12}";
  a_0ac_k16 = 0; a_0ac_k16 is "a_{0ac\\rightarrow k16}";
  a_k05_k05k08 = 0; a_k05_k05k08 is "a_{k05\\rightarrow k05k08}";
  a_k05_k05k12 = 0; a_k05_k05k12 is "a_{k05\\rightarrow k05k12}";
  a_k05_k05k16 = 0; a_k05_k05k16 is "a_{k05\\rightarrow k05k16}";
  a_k08_k05k08 = 0; a_k08_k05k08 is "a_{k08\\rightarrow k05k08}";
  a_k08_k08k12 = 0; a_k08_k08k12 is "a_{k08\\rightarrow k08k12}";
  a_k08_k08k16 = 0; a_k08_k08k16 is "a_{k08\\rightarrow k08k16}";
  a_k12_k05k12 = 0; a_k12_k05k12 is "a_{k12\\rightarrow k05k12}";
  a_k12_k08k12 = 0; a_k12_k08k12 is "a_{k12\\rightarrow k08k12}";
  a_k12_k12k16 = 0; a_k12_k12k16 is "a_{k12\\rightarrow k12k16}";
  a_k16_k05k16 = 0; a_k16_k05k16 is "a_{k16\\rightarrow k05k16}";
  a_k16_k08k16 = 0; a_k16_k08k16 is "a_{k16\\rightarrow k08k16}";
  a_k16_k12k16 = 0; a_k16_k12k16 is "a_{k16\\rightarrow k12k16}";
  a_k05k08_k05k08k12 = 0; a_k05k08_k05k08k12 is "a_{k05k08\\rightarrow k05k08k12}";
  a_k05k08_k05k08k16 = 0; a_k05k08_k05k08k16 is "a_{k05k08\\rightarrow k05k08k16}";
  a_k05k12_k05k08k12 = 0; a_k05k12_k05k08k12 is "a_{k05k12\\rightarrow k05k08k12}";
  a_k05k12_k05k12k16 = 0; a_k05k12_k05k12k16 is "a_{k05k12\\rightarrow k05k12k16}";
  a_k05k16_k05k08k16 = 0; a_k05k16_k05k08k16 is "a_{k05k16\\rightarrow k05k08k16}";
  a_k05k16_k05k12k16 = 0; a_k05k16_k05k12k16 is "a_{k05k16\\rightarrow k05k12k16}";
  a_k08k12_k05k08k12 = 0; a_k08k12_k05k08k12 is "a_{k08k12\\rightarrow k05k08k12}";
  a_k08k12_k08k12k16 = 0; a_k08k12_k08k12k16 is "a_{k08k12\\rightarrow k08k12k16}";
  a_k08k16_k05k08k16 = 0; a_k08k16_k05k08k16 is "a_{k08k16\\rightarrow k05k08k16}";
  a_k08k16_k08k12k16 = 0; a_k08k16_k08k12k16 is "a_{k08k16\\rightarrow k08k12k16}";
  a_k12k16_k05k12k16 = 0; a_k12k16_k05k12k16 is "a_{k12k16\\rightarrow k05k12k16}";
  a_k12k16_k08k12k16 = 0; a_k12k16_k08k12k16 is "a_{k12k16\\rightarrow k08k12k16}";
  a_k05k08k12_4ac = 0; a_k05k08k12_4ac is "a_{k05k08k12\\rightarrow 4ac}";
  a_k05k08k16_4ac = 0; a_k05k08k16_4ac is "a_{k05k08k16\\rightarrow 4ac}";
  a_k05k12k16_4ac = 0; a_k05k12k16_4ac is "a_{k05k12k16\\rightarrow 4ac}";
  a_k08k12k16_4ac = 0; a_k08k12k16_4ac is "a_{k08k12k16\\rightarrow 4ac}";

  // Reactions:
  r_a_0ac_k05: x_0ac => x_k05; a_0ac_k05*a_b*x_0ac; r_a_0ac_k05 is "r^a_{0ac\\rightarrow k05}";
  r_a_0ac_k08: x_0ac => x_k08; a_0ac_k08*a_b*x_0ac; r_a_0ac_k08 is "r^a_{0ac\\rightarrow k08}";
  r_a_0ac_k12: x_0ac => x_k12; a_0ac_k12*a_b*x_0ac; r_a_0ac_k12 is "r^a_{0ac\\rightarrow k12}";
  r_a_0ac_k16: x_0ac => x_k16; a_0ac_k16*a_b*x_0ac; r_a_0ac_k16 is "r^a_{0ac\\rightarrow k16}";
  r_a_k05_k05k08: x_k05 => x_k05k08; a_k05_k05k08*a_b*x_k05; r_a_k05_k05k08 is "r^a_{k05\\rightarrow k05k08}";
  r_a_k05_k05k12: x_k05 => x_k05k12; a_k05_k05k12*a_b*x_k05; r_a_k05_k05k12 is "r^a_{k05\\rightarrow k05k12}";
  r_a_k05_k05k16: x_k05 => x_k05k16; a_k05_k05k16*a_b*x_k05; r_a_k05_k05k16 is "r^a_{k05\\rightarrow k05k16}";
  r_a_k08_k05k08: x_k08 => x_k05k08; a_k08_k05k08*a_b*x_k08; r_a_k08_k05k08 is "r^a_{k08\\rightarrow k05k08}";
  r_a_k08_k08k12: x_k08 => x_k08k12; a_k08_k08k12*a_b*x_k08; r_a_k08_k08k12 is "r^a_{k08\\rightarrow k08k12}";
  r_a_k08_k08k16: x_k08 => x_k08k16; a_k08_k08k16*a_b*x_k08; r_a_k08_k08k16 is "r^a_{k08\\rightarrow k08k16}";
  r_a_k12_k05k12: x_k12 => x_k05k12; a_k12_k05k12*a_b*x_k12; r_a_k12_k05k12 is "r^a_{k12\\rightarrow k05k12}";
  r_a_k12_k08k12: x_k12 => x_k08k12; a_k12_k08k12*a_b*x_k12; r_a_k12_k08k12 is "r^a_{k12\\rightarrow k08k12}";
  r_a_k12_k12k16: x_k12 => x_k12k16; a_k12_k12k16*a_b*x_k12; r_a_k12_k12k16 is "r^a_{k12\\rightarrow k12k16}";
  r_a_k16_k05k16: x_k16 => x_k05k16; a_k16_k05k16*a_b*x_k16; r_a_k16_k05k16 is "r^a_{k16\\rightarrow k05k16}";
  r_a_k16_k08k16: x_k16 => x_k08k16; a_k16_k08k16*a_b*x_k16; r_a_k16_k08k16 is "r^a_{k16\\rightarrow k08k16}";
  r_a_k16_k12k16: x_k16 => x_k12k16; a_k16_k12k16*a_b*x_k16; r_a_k16_k12k16 is "r^a_{k16\\rightarrow k12k16}";
  r_a_k05k08_k05k08k12: x_k05k08 => x_k05k08k12; a_k05k08_k05k08k12*a_b*x_k05k08; r_a_k05k08_k05k08k12 is "r^a_{k05k08\\rightarrow k05k08k12}";
  r_a_k05k08_k05k08k16: x_k05k08 => x_k05k08k16; a_k05k08_k05k08k16*a_b*x_k05k08; r_a_k05k08_k05k08k16 is "r^a_{k05k08\\rightarrow k05k08k16}";
  r_a_k05k12_k05k08k12: x_k05k12 => x_k05k08k12; a_k05k12_k05k08k12*a_b*x_k05k12; r_a_k05k12_k05k08k12 is "r^a_{k05k12\\rightarrow k05k08k12}";
  r_a_k05k12_k05k12k16: x_k05k12 => x_k05k12k16; a_k05k12_k05k12k16*a_b*x_k05k12; r_a_k05k12_k05k12k16 is "r^a_{k05k12\\rightarrow k05k12k16}";
  r_a_k05k16_k05k08k16: x_k05k16 => x_k05k08k16; a_k05k16_k05k08k16*a_b*x_k05k16; r_a_k05k16_k05k08k16 is "r^a_{k05k16\\rightarrow k05k08k16}";
  r_a_k05k16_k05k12k16: x_k05k16 => x_k05k12k16; a_k05k16_k05k12k16*a_b*x_k05k16; r_a_k05k16_k05k12k16 is "r^a_{k05k16\\rightarrow k05k12k16}";
  r_a_k08k12_k05k08k12: x_k08k12 => x_k05k08k12; a_k08k12_k05k08k12*a_b*x_k08k12; r_a_k08k12_k05k08k12 is "r^a_{k08k12\\rightarrow k05k08k12}";
  r_a_k08k12_k08k12k16: x_k08k12 => x_k08k12k16; a_k08k12_k08k12k16*a_b*x_k08k12; r_a_k08k12_k08k12k16 is "r^a_{k08k12\\rightarrow k08k12k16}";
  r_a_k08k16_k05k08k16: x_k08k16 => x_k05k08k16; a_k08k16_k05k08k16*a_b*x_k08k16; r_a_k08k16_k05k08k16 is "r^a_{k08k16\\rightarrow k05k08k16}";
  r_a_k08k16_k08k12k16: x_k08k16 => x_k08k12k16; a_k08k16_k08k12k16*a_b*x_k08k16; r_a_k08k16_k08k12k16 is "r^a_{k08k16\\rightarrow k08k12k16}";
  r_a_k12k16_k05k12k16: x_k12k16 => x_k05k12k16; a_k12k16_k05k12k16*a_b*x_k12k16; r_a_k12k16_k05k12k16 is "r^a_{k12k16\\rightarrow k05k12k16}";
  r_a_k12k16_k08k12k16: x_k12k16 => x_k08k12k16; a_k12k16_k08k12k16*a_b*x_k12k16; r_a_k12k16_k08k12k16 is "r^a_{k12k16\\rightarrow k08k12k16}";
  r_a_k05k08k12_4ac: x_k05k08k12 => x_4ac; a_k05k08k12_4ac*a_b*x_k05k08k12; r_a_k05k08k12_4ac is "r^a_{k05k08k12\\rightarrow 4ac}";
  r_a_k05k08k16_4ac: x_k05k08k16 => x_4ac; a_k05k08k16_4ac*a_b*x_k05k08k16; r_a_k05k08k16_4ac is "r^a_{k05k08k16\\rightarrow 4ac}";
  r_a_k05k12k16_4ac: x_k05k12k16 => x_4ac; a_k05k12k16_4ac*a_b*x_k05k12k16; r_a_k05k12k16_4ac is "r^a_{k05k12k16\\rightarrow 4ac}";
  r_a_k08k12k16_4ac: x_k08k12k16 => x_4ac; a_k08k12k16_4ac*a_b*x_k08k12k16; r_a_k08k12k16_4ac is "r^a_{k08k12k16\\rightarrow 4ac}";
  r_da_k05_0ac: x_k05 => x_0ac; da_b*x_k05; r_da_k05_0ac is "r^{da}_{k05\\rightarrow 0ac}";
  r_da_k08_0ac: x_k08 => x_0ac; da_b*x_k08; r_da_k08_0ac is "r^{da}_{k08\\rightarrow 0ac}";
  r_da_k12_0ac: x_k12 => x_0ac; da_b*x_k12; r_da_k12_0ac is "r^{da}_{k12\\rightarrow 0ac}";
  r_da_k16_0ac: x_k16 => x_0ac; da_b*x_k16; r_da_k16_0ac is "r^{da}_{k16\\rightarrow 0ac}";
  r_da_k05k08_k08: x_k05k08 => x_k08; da_b*x_k05k08; r_da_k05k08_k08 is "r^{da}_{k05k08\\rightarrow k08}";
  r_da_k05k08_k05: x_k05k08 => x_k05; da_b*x_k05k08; r_da_k05k08_k05 is "r^{da}_{k05k08\\rightarrow k05}";
  r_da_k05k12_k12: x_k05k12 => x_k12; da_b*x_k05k12; r_da_k05k12_k12 is "r^{da}_{k05k12\\rightarrow k12}";
  r_da_k05k12_k05: x_k05k12 => x_k05; da_b*x_k05k12; r_da_k05k12_k05 is "r^{da}_{k05k12\\rightarrow k05}";
  r_da_k05k16_k16: x_k05k16 => x_k16; da_b*x_k05k16; r_da_k05k16_k16 is "r^{da}_{k05k16\\rightarrow k16}";
  r_da_k05k16_k05: x_k05k16 => x_k05; da_b*x_k05k16; r_da_k05k16_k05 is "r^{da}_{k05k16\\rightarrow k05}";
  r_da_k08k12_k12: x_k08k12 => x_k12; da_b*x_k08k12; r_da_k08k12_k12 is "r^{da}_{k08k12\\rightarrow k12}";
  r_da_k08k12_k08: x_k08k12 => x_k08; da_b*x_k08k12; r_da_k08k12_k08 is "r^{da}_{k08k12\\rightarrow k08}";
  r_da_k08k16_k16: x_k08k16 => x_k16; da_b*x_k08k16; r_da_k08k16_k16 is "r^{da}_{k08k16\\rightarrow k16}";
  r_da_k08k16_k08: x_k08k16 => x_k08; da_b*x_k08k16; r_da_k08k16_k08 is "r^{da}_{k08k16\\rightarrow k08}";
  r_da_k12k16_k16: x_k12k16 => x_k16; da_b*x_k12k16; r_da_k12k16_k16 is "r^{da}_{k12k16\\rightarrow k16}";
  r_da_k12k16_k12: x_k12k16 => x_k12; da_b*x_k12k16; r_da_k12k16_k12 is "r^{da}_{k12k16\\rightarrow k12}";
  r_da_k05k08k12_k08k12: x_k05k08k12 => x_k08k12; da_b*x_k05k08k12; r_da_k05k08k12_k08k12 is "r^{da}_{k05k08k12\\rightarrow k08k12}";
  r_da_k05k08k12_k05k12: x_k05k08k12 => x_k05k12; da_b*x_k05k08k12; r_da_k05k08k12_k05k12 is "r^{da}_{k05k08k12\\rightarrow k05k12}";
  r_da_k05k08k12_k05k08: x_k05k08k12 => x_k05k08; da_b*x_k05k08k12; r_da_k05k08k12_k05k08 is "r^{da}_{k05k08k12\\rightarrow k05k08}";
  r_da_k05k08k16_k08k16: x_k05k08k16 => x_k08k16; da_b*x_k05k08k16; r_da_k05k08k16_k08k16 is "r^{da}_{k05k08k16\\rightarrow k08k16}";
  r_da_k05k08k16_k05k16: x_k05k08k16 => x_k05k16; da_b*x_k05k08k16; r_da_k05k08k16_k05k16 is "r^{da}_{k05k08k16\\rightarrow k05k16}";
  r_da_k05k08k16_k05k08: x_k05k08k16 => x_k05k08; da_b*x_k05k08k16; r_da_k05k08k16_k05k08 is "r^{da}_{k05k08k16\\rightarrow k05k08}";
  r_da_k05k12k16_k12k16: x_k05k12k16 => x_k12k16; da_b*x_k05k12k16; r_da_k05k12k16_k12k16 is "r^{da}_{k05k12k16\\rightarrow k12k16}";
  r_da_k05k12k16_k05k16: x_k05k12k16 => x_k05k16; da_b*x_k05k12k16; r_da_k05k12k16_k05k16 is "r^{da}_{k05k12k16\\rightarrow k05k16}";
  r_da_k05k12k16_k05k12: x_k05k12k16 => x_k05k12; da_b*x_k05k12k16; r_da_k05k12k16_k05k12 is "r^{da}_{k05k12k16\\rightarrow k05k12}";
  r_da_k08k12k16_k12k16: x_k08k12k16 => x_k12k16; da_b*x_k08k12k16; r_da_k08k12k16_k12k16 is "r^{da}_{k08k12k16\\rightarrow k12k16}";
  r_da_k08k12k16_k08k16: x_k08k12k16 => x_k08k16; da_b*x_k08k12k16; r_da_k08k12k16_k08k16 is "r^{da}_{k08k12k16\\rightarrow k08k16}";
  r_da_k08k12k16_k08k12: x_k08k12k16 => x_k08k12; da_b*x_k08k12k16; r_da_k08k12k16_k08k12 is "r^{da}_{k08k12k16\\rightarrow k08k12}";
  r_da_4ac_k08k12k16: x_4ac => x_k08k12k16; da_b*x_4ac; r_da_4ac_k08k12k16 is "r^{da}_{4ac\\rightarrow k08k12k16}";
  r_da_4ac_k05k12k16: x_4ac => x_k05k12k16; da_b*x_4ac; r_da_4ac_k05k12k16 is "r^{da}_{4ac\\rightarrow k05k12k16}";
  r_da_4ac_k05k08k16: x_4ac => x_k05k08k16; da_b*x_4ac; r_da_4ac_k05k08k16 is "r^{da}_{4ac\\rightarrow k05k08k16}";
  r_da_4ac_k05k08k12: x_4ac => x_k05k08k12; da_b*x_4ac; r_da_4ac_k05k08k12 is "r^{da}_{4ac\\rightarrow k05k08k12}";
end
